<?xml version="1.0" encoding="UTF-8"?>

<!--###################################################################################
    This file is licenced under the terms of the GNU General Public Licence V3 or later
    ###################################################################################
-->

<?xml-stylesheet type="text/xsl" href="http://jsbsim.sourceforge.net/JSBSim.xsl"?>
<fdm_config name="shuttle" version="2.0" release="ALPHA"
   xmlns:xsi="http://www.w3.org/2001/XMLSchema-instance"
   xsi:noNamespaceSchemaLocation="http://jsbsim.sourceforge.net/JSBSim.xsd">

 <fileheader>
  <author>Thorsten Renk</author>
  <filecreationdate>04-2015</filecreationdate>
  <version>$Revision: 4$</version>
  <description>Space Shuttle Model JSBSim</description>
 </fileheader>


 <metrics>
   <wingarea  unit="FT2"> 2691.25 </wingarea>
   <wingspan  unit="FT" >   78.06 </wingspan>
   <wing_incidence>          2.00 </wing_incidence>
   <chord     unit="FT" >   34.48 </chord>
   <htailarea unit="FT2">  672.81 </htailarea>
   <htailarm  unit="FT" >   54.98 </htailarm>
   <vtailarea unit="FT2">  538.25 </vtailarea>
   <vtailarm  unit="FT" >   54.98 </vtailarm>
   <location name="AERORP" unit="M">
     <x>   2.70 </x>
     <y>   0.00 </y>
     <z>  -2.70 </z>
   </location>
   <location name="EYEPOINT" unit="M">
     <x> 102.62 </x>
     <y> -30.00 </y>
     <z>  75.00 </z>
   </location>
   <location name="VRP" unit="M">
     <x>0</x>
     <y>0</y>
     <z>0</z>
   </location>
 </metrics>

 <!--changing some values: ixx from  425779 to 2025779
                           izz from 2475373 to 4575373
                        emtywt from  172000 to  180000
                    location z from     1.0 to     5.0-->
 <mass_balance>
   <ixx unit="SLUG*FT2">   3025779 </ixx>
   <iyy unit="SLUG*FT2">   5162623 </iyy>
   <izz unit="SLUG*FT2">   5575373 </izz>
   <emptywt unit="LBS" >    180000 </emptywt>
   <location name="CG" unit="M">
     <x>   2.70 </x>
     <y>   0.00 </y>
     <z>  -2.70 </z>
   </location>
        <pointmass name="Equipment">
            <weight unit="LBS"> 40000 </weight>
            <location name="POINTMASS" unit="M">
                <x>  2.7 </x>
                <y>  0.0 </y>
                <z> -2.7 </z>
            </location>
        </pointmass>
	<!-- add the external tank as two masses to get roll inertia-->
	<pointmass name="External_tank1_dry">
            <weight unit="LBS"> 29250.0 </weight>
		<location  unit="M">
		<x> -4.00 </x>
       		<y> -2.50 </y>
       		<z>-10.6 </z>
     		</location>
	</pointmass>
	<pointmass name="External_tank2_dry">
            <weight unit="LBS"> 29250.0 </weight>
		<location unit="M">
		<x> -4.00 </x>
       		<y> 2.50 </y>
       		<z>-10.6 </z>
     		</location>
	</pointmass>
	<pointmass name="SRB-1_dry">
        	<weight unit="LBS"> 181881.0</weight>
		<location unit="M">
			<x> 1.00 </x>
       			<y> -6.10 </y>
       			<z>-10.6 </z>
     		</location>
	</pointmass>
	<pointmass name="SRB-2_dry">
        	<weight unit="LBS"> 181881.0</weight>
		<location unit="M">
			<x> 1.00 </x>
       			<y> 6.10 </y>
       			<z>-10.6 </z>
     		</location>
	</pointmass>
 </mass_balance>


 <ground_reactions>

<contact type="BOGEY" name="NOSE">
<location unit="M">
<x> -15.00 </x>
<y> 0.00 </y>
<z> -6.95 </z>
</location>
<static_friction> 0.40 </static_friction>
<dynamic_friction> 0.10 </dynamic_friction>
<rolling_friction> 0.02 </rolling_friction>
<spring_coeff unit="LBS/FT"> 90000.00 </spring_coeff>
<damping_coeff unit="LBS/FT/SEC"> 30000.00 </damping_coeff>
<max_steer unit="DEG"> 15.00 </max_steer>
<brake_group>NONE</brake_group>
<retractable>1</retractable>
</contact>

<contact type="BOGEY" name="LEFT_MAIN">
<location unit="M">
<x> 3.60 </x>
<y> -4.2 </y>
<z>-6.85 </z>
</location>
<static_friction> 0.40 </static_friction>
<dynamic_friction> 0.10 </dynamic_friction>
<rolling_friction> 0.02 </rolling_friction>
<spring_coeff unit="LBS/FT"> 550000.00 </spring_coeff>
<damping_coeff unit="LBS/FT/SEC"> 110000.00 </damping_coeff>
<max_steer unit="DEG">0</max_steer>
<brake_group>LEFT</brake_group>
<retractable>1</retractable>
</contact>

<contact type="BOGEY" name="RIGHT_MAIN">
<location unit="M">
<x> 3.60 </x>
<y> 4.2 </y>
<z>-6.85 </z>
</location>
<static_friction> 0.40 </static_friction>
<dynamic_friction> 0.10 </dynamic_friction>
<rolling_friction> 0.02 </rolling_friction>
<spring_coeff unit="LBS/FT"> 550000.00 </spring_coeff>
<damping_coeff unit="LBS/FT/SEC"> 210000.00 </damping_coeff>
<max_steer unit="DEG">0</max_steer>
<brake_group>RIGHT</brake_group>
<retractable>1</retractable>
</contact>

<contact type="STRUCTURE" name="LEFT_SRB">
<location unit="M">
<x> 18.28 </x>
<y> -4.2 </y>
<z>-14.6 </z>
</location>
<static_friction> 0.80 </static_friction>
<dynamic_friction> 0.20 </dynamic_friction>
<rolling_friction> 0.02 </rolling_friction>
<spring_coeff unit="LBS/FT"> 3550000.00 </spring_coeff>
<damping_coeff unit="LBS/FT/SEC"> 210000.00 </damping_coeff>
</contact>

<contact type="STRUCTURE" name="RIGHT_SRB">
<location unit="M">
<x> 18.28 </x>
<y> 4.2 </y>
<z>-14.6 </z>
</location>
<static_friction> 0.80 </static_friction>
<dynamic_friction> 0.20 </dynamic_friction>
<rolling_friction> 0.02 </rolling_friction>
<spring_coeff unit="LBS/FT"> 3550000.00 </spring_coeff>
<damping_coeff unit="LBS/FT/SEC"> 210000.00 </damping_coeff>
</contact>

<contact type="STRUCTURE" name="FICTIONAL CENTER">
<location unit="M">
<x> 18.48 </x>
<y> 0.0 </y>
<z> 4.0 </z>
</location>
<static_friction> 0.80 </static_friction>
<dynamic_friction> 0.20 </dynamic_friction>
<rolling_friction> 0.02 </rolling_friction>
<spring_coeff unit="LBS/FT"> 1100000.00 </spring_coeff>
<damping_coeff unit="LBS/FT/SEC"> 210000.00 </damping_coeff>
</contact>


  <contact type="STRUCTURE" name="FRONT_LEG">
   <location unit="IN">
     <x> 300.00 </x>
     <y> 300.00 </y>
     <z> 400.00 </z>
   </location>
   <static_friction>  0.80 </static_friction>
   <dynamic_friction> 0.50 </dynamic_friction>
   <spring_coeff unit="LBS/FT">      412500.00 </spring_coeff>
   <damping_coeff unit="LBS/FT/SEC"> 82500.00 </damping_coeff>
 </contact>


 </ground_reactions>

 <propulsion>


   <!--SSME  -->

   <engine file="SSME">
    <location unit="M">
      <x> 17.00 </x>
      <y>   -1.35 </y>
      <z>   -3.45 </z>
    </location>
    <orient unit="DEG">
      <pitch> -16.00 </pitch>
      <roll>  0.00 </roll>
      <yaw>   0.00 </yaw>
    </orient>
    <feed>0</feed>
    <thruster file="SSME_nozzle">
     <location unit="M">
      <x> 17.00 </x>
      <y>   -1.35 </y>
      <z>   -3.45 </z>
     </location>
     <orient unit="DEG">
       <pitch> -16.00 </pitch>
       <roll>  0.00 </roll>
       <yaw>   0.00 </yaw>
     </orient>
    </thruster>
  </engine>

  <engine file="SSME">
    <location unit="M">
      <x> 17.00 </x>
      <y>   1.35 </y>
      <z>   -3.45 </z>
    </location>
    <orient unit="DEG">
      <pitch> -16.00 </pitch>
      <roll>  0.00 </roll>
      <yaw>   0.00 </yaw>
    </orient>
    <feed>0</feed>
    <thruster file="SSME_nozzle">
     <location unit="M">
      <x> 17.00 </x>
      <y>   1.35 </y>
      <z>   -3.45 </z>
     </location>
     <orient unit="DEG">
       <pitch> -16.00 </pitch>
       <roll>  0.00 </roll>
       <yaw>   0.00 </yaw>
     </orient>
    </thruster>
  </engine>

  <engine file="SSME">
    <location unit="M">
      <x> 17.00 </x>
      <y>   0.00 </y>
      <z>   -1.0 </z>
    </location>
    <orient unit="DEG">
      <pitch> -16.00 </pitch>
      <roll>  0.00 </roll>
      <yaw>   0.00 </yaw>
    </orient>
    <feed>0</feed>
    <thruster file="SSME_nozzle">
     <location unit="M">
      <x> 17.00 </x>
      <y>   0.00 </y>
      <z>   -1.0 </z>
     </location>
     <orient unit="DEG">
       <pitch> -16.00 </pitch>
       <roll>  0.00 </roll>
       <yaw>   0.00 </yaw>
     </orient>
    </thruster>
  </engine>


<!-- external tank -->
  <tank type="FUEL" number="0">
     <location unit="M">
       <x> -15.00 </x>
       <y> 0.00 </y>
       <z>-10.6 </z>
     </location>
     <capacity unit="LBS"> 1618634.00 </capacity>
     <contents unit="LBS"> 1618634.00 </contents>
     <priority>1</priority>
  </tank>


<!-- SRB -->


   <engine file="SRB">
    <location unit="M">
      <x> 18.28 </x>
      <y>  -6.10 </y>
      <z>-10.6 </z>
    </location>
    <orient unit="DEG">
      <pitch> 0.00 </pitch>
      <roll>  0.00 </roll>
      <yaw>   0.00 </yaw>
    </orient>
    <feed>1</feed>

    <thruster file="SRB_nozzle">
     <location unit="M">
      <x> 18.28 </x>
      <y>  -6.10 </y>
      <z>-10.6 </z>
     </location>
     <orient unit="DEG">
       <pitch> 0.00 </pitch>
       <roll>  0.00 </roll>
       <yaw>   0.00 </yaw>
     </orient>
    </thruster>
  </engine>

  <tank type="FUEL" number="1">
     <location unit="M">
       <x> 1.00 </x>
       <y> -6.10 </y>
       <z>-10.6 </z>
     </location>
     <!--<capacity unit="LBS"> 1264825.0 </capacity>
     <contents unit="LBS"> 1264825.0 </contents>-->
      <capacity unit="LBS">1114092.6</capacity>
      <contents unit="LBS">1114092.6</contents>
  </tank>

 <engine file="SRB">
    <location unit="M">
      <x> 18.28 </x>
      <y>  6.10 </y>
      <z>-10.6 </z>
    </location>
    <orient unit="DEG">
      <pitch> 0.00 </pitch>
      <roll>  0.00 </roll>
      <yaw>   0.00 </yaw>
    </orient>
    <feed>2</feed>

    <thruster file="SRB_nozzle">
     <location unit="M">
      <x> 18.28 </x>
      <y>  6.10 </y>
      <z>-10.6 </z>
     </location>
     <orient unit="DEG">
       <pitch> 0.00 </pitch>
       <roll>  0.00 </roll>
       <yaw>   0.00 </yaw>
     </orient>
    </thruster>
  </engine>

  <tank type="FUEL" number="2">
     <location unit="M">
       <x> 1.00 </x>
       <y> 6.10 </y>
       <z>-10.6 </z>
     </location>
     <!--<capacity unit="LBS"> 1264825.0 </capacity>
     <contents unit="LBS"> 1264825.0 </contents>-->
      <capacity unit="LBS">1114092.6</capacity>
      <contents unit="LBS">1114092.6</contents>
  </tank>


<!-- OMS -->

   <!-- left OMS thruster -->

   <engine file="OMS">
    <location unit="M">
      <x> 17.0 </x>
       <y> -1.52 </y>
       <z> 0.27 </z>
    </location>
    <orient unit="DEG">
      <pitch> 4.0 </pitch>
      <roll>  0.00 </roll>
      <yaw>   0.00 </yaw>
    </orient>
    <feed>3</feed>
    <thruster file="OMS_nozzle">
     <location unit="M">
      <x> 17.0 </x>
       <y> -1.52 </y>
       <z> 0.27 </z>
    </location>
     <orient unit="DEG">
       <pitch> 4.0 </pitch>
       <roll>  0.00 </roll>
       <yaw>   0.00 </yaw>
     </orient>
    </thruster>
    </engine>

   <!-- right OMS thruster -->

   <engine file="OMS">
    <location unit="M">
      <x> 17.0 </x>
       <y> 1.52 </y>
       <z> 0.27 </z>
    </location>
    <orient unit="DEG">
      <pitch> 4.0 </pitch>
      <roll>  0.00 </roll>
      <yaw>   0.00 </yaw>
    </orient>
     <feed>3</feed>
    <thruster file="OMS_nozzle">
     <location unit="M">
      <x> 17.0 </x>
       <y> 1.52 </y>
       <z> 0.27 </z>
    </location>
     <orient unit="DEG">
       <pitch> 4.0 </pitch>
       <roll>  0.00 </roll>
       <yaw>   0.00 </yaw>
     </orient>
    </thruster>
    </engine>


<!-- RCS -->

<!-- RCS layout: three thruster positions: Nose and two OMS pods -->
<!-- all have up, down, left, right thrusters, Nose has forward, OMS pods have rearward -->

<!-- Nose thrusters -->

<!-- Nose up -->
  <engine file="RCS">
    <location unit="M">
      <x>-15.0</x>
      <y>0.0</y>
      <z>-2.5</z>
    </location>
    <orient unit="DEG">
      <pitch>-90.00 </pitch>
      <roll>   0.00 </roll>
      <yaw>    0.00 </yaw>
    </orient>
    <feed>4</feed>
    <feed>5</feed>
    <thruster file="RCS_nozzle">
      <location unit="M">
      <x>-15.0</x>
      <y>0.0</y>
      <z>-2.5</z>
      </location>
     <orient unit="DEG">
       <pitch>-90.00 </pitch>
       <roll>   0.00 </roll>
       <yaw>    0.00 </yaw>
     </orient>
    </thruster>
  </engine>

<!-- Nose down -->
  <engine file="RCS">
    <location unit="M">
      <x>-15.0</x>
      <y>0.0</y>
      <z>-2.5</z>
    </location>
    <orient unit="DEG">
      <pitch>90.00 </pitch>
      <roll>   0.00 </roll>
      <yaw>    0.00 </yaw>
    </orient>
    <feed>4</feed>
    <feed>5</feed>
    <thruster file="RCS_nozzle">
      <location unit="M">
      <x>-15.0</x>
      <y>0.0</y>
      <z>-2.5</z>
      </location>
     <orient unit="DEG">
       <pitch>  90.00 </pitch>
       <roll>   0.00 </roll>
       <yaw>    0.00 </yaw>
     </orient>
    </thruster>
  </engine>

<!-- Nose left -->
 <engine file="RCS">
    <location unit="M">
      <x>-15.0</x>
      <y>0.0</y>
      <z>-2.5</z>
    </location>
    <orient unit="DEG">
      <pitch>  0.00 </pitch>
      <roll>   0.00 </roll>
      <yaw>    90.00 </yaw>
    </orient>
    <feed>4</feed>
    <feed>5</feed>
    <thruster file="RCS_nozzle">
      <location unit="M">
      <x>-15.0</x>
      <y>0.0</y>
      <z>-2.5</z>
      </location>
     <orient unit="DEG">
       <pitch>0.00 </pitch>
       <roll>   0.00 </roll>
       <yaw>    90.00 </yaw>
     </orient>
    </thruster>
  </engine>

<!-- Nose right -->
<engine file="RCS">
    <location unit="M">
      <x>-15.0</x>
      <y>0.0</y>
      <z>-2.5</z>
    </location>
    <orient unit="DEG">
      <pitch> 0.00 </pitch>
      <roll>   0.00 </roll>
      <yaw>    -90.00 </yaw>
    </orient>
    <feed>4</feed>
    <feed>5</feed>
    <thruster file="RCS_nozzle">
      <location unit="M">
      <x>-15.0</x>
      <y>0.0</y>
      <z>-2.5</z>
      </location>
     <orient unit="DEG">
       <pitch>  0.00 </pitch>
       <roll>   0.00 </roll>
       <yaw>    -90.00 </yaw>
     </orient>
    </thruster>
  </engine>

<!-- Nose forward -->
 <engine file="RCS">
    <location unit="M">
      <x>-15.0</x>
      <y>0.0</y>
      <z>-2.5</z>
    </location>
    <orient unit="DEG">
      <pitch>  0.00 </pitch>
      <roll>   0.00 </roll>
      <yaw>    -180.00 </yaw>
    </orient>
    <feed>4</feed>
    <feed>5</feed>
    <thruster file="RCS_nozzle">
      <location unit="M">
      <x>-15.0</x>
      <y>0.0</y>
      <z>-2.5</z>
      </location>
     <orient unit="DEG">
       <pitch>0.00 </pitch>
       <roll>   0.00 </roll>
       <yaw>    -180.00 </yaw>
     </orient>
    </thruster>
  </engine>


<!-- OMS pod 1 thrusters -->

<!-- OMS 1 up -->

 <engine file="RCS">
    <location unit="M">
      <x>17.0</x>
      <y>-1.5</y>
      <z>-0.5</z>
    </location>
    <orient unit="DEG">
      <pitch>-90.00 </pitch>
      <roll>   0.00 </roll>
      <yaw>    0.00 </yaw>
    </orient>
    <feed>4</feed>
    <feed>5</feed>
    <thruster file="RCS_nozzle">
      <location unit="M">
      <x>17.0</x>
      <y>-1.5</y>
      <z>-0.5</z>
      </location>
     <orient unit="DEG">
       <pitch>-90.00 </pitch>
       <roll> 0.00 </roll>
       <yaw>  0.00 </yaw>
     </orient>
    </thruster>
  </engine>

<!-- OMS 1 down -->

<engine file="RCS">
    <location unit="M">
      <x>17.0</x>
      <y>-1.5</y>
      <z>-0.5</z>
    </location>
    <orient unit="DEG">
      <pitch>90.00 </pitch>
      <roll>   0.00 </roll>
      <yaw>    0.00 </yaw>
    </orient>
    <feed>4</feed>
    <feed>5</feed>
    <thruster file="RCS_nozzle">
      <location unit="M">
      <x>17.0</x>
      <y>-1.5</y>
      <z>-0.5</z>
      </location>
     <orient unit="DEG">
       <pitch>90.00 </pitch>
       <roll> 0.00 </roll>
       <yaw>  0.00 </yaw>
     </orient>
    </thruster>
  </engine>

<!-- OMS 1 left -->

<engine file="RCS">
    <location unit="M">
      <x>17.0</x>
      <y>-1.5</y>
      <z>-0.5</z>
    </location>
    <orient unit="DEG">
      <pitch>  0.00 </pitch>
      <roll>   0.00 </roll>
      <yaw>    90.00 </yaw>
    </orient>
    <feed>4</feed>
    <feed>5</feed>
    <thruster file="RCS_nozzle">
      <location unit="M">
      <x>17.0</x>
      <y>-1.5</y>
      <z>-0.5</z>
      </location>
     <orient unit="DEG">
       <pitch>0.00 </pitch>
       <roll> 0.00 </roll>
       <yaw>  90.00 </yaw>
     </orient>
    </thruster>
  </engine>

<!-- OMS 1 right -->

<engine file="RCS">
    <location unit="M">
      <x>17.0</x>
      <y>-1.5</y>
      <z>-0.5</z>
    </location>
    <orient unit="DEG">
      <pitch>  0.00 </pitch>
      <roll>   0.00 </roll>
      <yaw>    -90.00 </yaw>
    </orient>
    <feed>4</feed>
    <feed>5</feed>
    <thruster file="RCS_nozzle">
      <location unit="M">
      <x>17.0</x>
      <y>-1.5</y>
      <z>-0.5</z>
      </location>
     <orient unit="DEG">
       <pitch>0.00 </pitch>
       <roll> 0.00 </roll>
       <yaw>  -90.00 </yaw>
     </orient>
    </thruster>
  </engine>

<!-- OMS 1 rear -->

<engine file="RCS">
    <location unit="M">
      <x>17.0</x>
      <y>-1.5</y>
      <z>-0.5</z>
    </location>
    <orient unit="DEG">
      <pitch>  0.00 </pitch>
      <roll>   0.00 </roll>
      <yaw>    0.00 </yaw>
    </orient>
    <feed>4</feed>
    <feed>5</feed>
    <thruster file="RCS_nozzle">
      <location unit="M">
      <x>17.0</x>
      <y>-1.5</y>
      <z>-0.5</z>
      </location>
     <orient unit="DEG">
       <pitch>0.00 </pitch>
       <roll> 0.00 </roll>
       <yaw>  0.00 </yaw>
     </orient>
    </thruster>
  </engine>

<!-- OMS pod 2 thrusters -->

<!-- OMS 2 up -->

 <engine file="RCS">
    <location unit="M">
      <x>17.0</x>
      <y>1.5</y>
      <z>-0.5</z>
    </location>
    <orient unit="DEG">
      <pitch>-90.00 </pitch>
      <roll>   0.00 </roll>
      <yaw>    0.00 </yaw>
    </orient>
    <feed>4</feed>
    <feed>5</feed>
    <thruster file="RCS_nozzle">
      <location unit="M">
      <x>17.0</x>
      <y>1.5</y>
      <z>-0.5</z>
      </location>
     <orient unit="DEG">
       <pitch>-90.00 </pitch>
       <roll> 0.00 </roll>
       <yaw>  0.00 </yaw>
     </orient>
    </thruster>
  </engine>

<!-- OMS 2 down -->

<engine file="RCS">
    <location unit="M">
      <x>17.0</x>
      <y>1.5</y>
      <z>-0.5</z>
    </location>
    <orient unit="DEG">
      <pitch>90.00 </pitch>
      <roll>   0.00 </roll>
      <yaw>    0.00 </yaw>
    </orient>
    <feed>4</feed>
    <feed>5</feed>
    <thruster file="RCS_nozzle">
      <location unit="M">
      <x>17.0</x>
      <y>1.5</y>
      <z>-0.5</z>
      </location>
     <orient unit="DEG">
       <pitch>90.00 </pitch>
       <roll> 0.00 </roll>
       <yaw>  0.00 </yaw>
     </orient>
    </thruster>
  </engine>

<!-- OMS 2 left -->

<engine file="RCS">
    <location unit="M">
      <x>17.0</x>
      <y>1.5</y>
      <z>-0.5</z>
    </location>
    <orient unit="DEG">
      <pitch>  0.00 </pitch>
      <roll>   0.00 </roll>
      <yaw>    90.00 </yaw>
    </orient>
    <feed>4</feed>
    <feed>5</feed>
    <thruster file="RCS_nozzle">
      <location unit="M">
      <x>17.0</x>
      <y>1.5</y>
      <z>-0.5</z>
      </location>
     <orient unit="DEG">
       <pitch>0.00 </pitch>
       <roll> 0.00 </roll>
       <yaw>  90.00 </yaw>
     </orient>
    </thruster>
  </engine>

<!-- OMS 2 right -->

<engine file="RCS">
    <location unit="M">
      <x>17.0</x>
      <y>1.5</y>
      <z>-0.5</z>
    </location>
    <orient unit="DEG">
      <pitch>  0.00 </pitch>
      <roll>   0.00 </roll>
      <yaw>    -90.00 </yaw>
    </orient>
    <feed>4</feed>
    <feed>5</feed>
    <thruster file="RCS_nozzle">
      <location unit="M">
      <x>17.0</x>
      <y>1.5</y>
      <z>-0.5</z>
      </location>
     <orient unit="DEG">
       <pitch>0.00 </pitch>
       <roll> 0.00 </roll>
       <yaw>  -90.00 </yaw>
     </orient>
    </thruster>
  </engine>

<!-- OMS 2 rear -->

<engine file="RCS">
    <location unit="M">
      <x>17.0</x>
      <y>1.5</y>
      <z>-0.5</z>
    </location>
    <orient unit="DEG">
      <pitch>  0.00 </pitch>
      <roll>   0.00 </roll>
      <yaw>    0.00 </yaw>
    </orient>
    <feed>4</feed>
    <feed>5</feed>
    <thruster file="RCS_nozzle">
      <location unit="M">
      <x>17.0</x>
      <y>1.5</y>
      <z>-0.5</z>
      </location>
     <orient unit="DEG">
       <pitch>0.00 </pitch>
       <roll> 0.00 </roll>
       <yaw>  0.00 </yaw>
     </orient>
    </thruster>
  </engine>


  <!--tank definitions -->

 <!-- OMS - at the moment both tanks together at the CoG-->

  <tank type="FUEL" number="3">
     <location unit="IN">
       <x> 1.00 </x>
       <y>   0.00 </y>
       <z>-100.00 </z>
     </location>
     <capacity unit="LBS"> 24982.00 </capacity>
     <contents unit="LBS"> 24982.00 </contents>
     <priority>2</priority>
  </tank>

 <!-- RCS tanks - at the moment all three together at the CoG-->

                <tank type="OXIDIZER" number="4">
			<location unit="IN">
				<x> 0.0 </x>
				<y> 0.0 </y>
				<z> -4.251 </z>
			</location>
			<capacity unit="LBS"> 4341.00 </capacity>
			<contents unit="LBS"> 4341.00 </contents>
		</tank>

		<tank type="FUEL" number="5">
			<location unit="IN">
				<x> 0.0 </x>
				<y> 0.0 </y>
				<z> -4.251 </z>
			</location>
			<capacity unit="LBS"> 2784.00 </capacity>
			<contents unit="LBS"> 2784.00 </contents>
		</tank>

<!--new tanks for control engines  end-->

 </propulsion>

<!-- Flight Control routines - this block has airfoils and thrust vectoring commands, the RCS is under Systems -->


 <flight_control name="FCS: shuttle">


  <channel name="Pitch">

  <switch name="Disable airfoil pitch if thrust vectoring is used">
			<default value="1.0"/>
			<test value="0.0">
				systems/fcs/control-mode == 0
			</test>
		<output>fcs/airfoil-factor-pitch</output>
		</switch>

   <summer name="Pitch Trim Sum">
      <input>fcs/elevator-cmd-norm</input>
      <input>fcs/pitch-trim-cmd-norm</input>
      <clipto>
        <min> -1 </min>
        <max>  1 </max>
      </clipto>
   </summer>

   <aerosurface_scale name="Elevator Control">
      <input>fcs/pitch-trim-sum</input>
      <range>
        <min> -0.70 </min>
        <max>  0.44 </max>
      </range>
      <output>fcs/elevator-pos-rad-command</output>
   </aerosurface_scale>

   <pure_gain name="Actual Elevator Motion">
	<input>fcs/elevator-pos-rad-command</input>
	<gain>fcs/airfoil-factor-pitch</gain>
	<output>fcs/elevator-pos-rad</output>
   </pure_gain>

   <aerosurface_scale name="Elevator Normalization">
      <input>fcs/elevator-pos-rad-command</input>
      <domain>
        <min> -0.70 </min>
        <max>  0.44 </max>
      </domain>
      <range>
        <min> -1 </min>
        <max>  1 </max>
      </range>
      <output>fcs/elevator-pos-norm</output>
   </aerosurface_scale>


  <!-- thrust vectoring -->

   <fcs_function name="Pitch SSME 1 2 to CoG">
	<function>
	<product>
	<value>-1.0</value>
	<atan>
		<quotient>
		<difference>
			<value>-136.0</value>
			<property>inertia/cg-z-in</property>

		</difference>
		<difference>
			<value>700.0</value>
			<property>inertia/cg-x-in</property>
		</difference>

		</quotient>
	</atan>
	</product>
   	</function>
	<output>propulsion/engine[0]/pitch-to-CoG</output>
	<output>propulsion/engine[1]/pitch-to-CoG</output>
   </fcs_function>


   <fcs_function name="Pitch SSME 3 to CoG">
	<function>
	<product>
	<value>-1.0</value>
	<atan>
		<quotient>
		<difference>
			<value>-39.4</value>
			<property>inertia/cg-z-in</property>

		</difference>
		<difference>
			<value>700.0</value>
			<property>inertia/cg-x-in</property>
		</difference>

		</quotient>
	</atan>
	</product>
   	</function>
	<output>propulsion/engine[2]/pitch-to-CoG</output>
   </fcs_function>

   <fcs_function name="Pitch SRB 1 2 to CoG">
	<function>
	<product>
	<value>-1.0</value>
	<atan>
		<quotient>
		<difference>
			<value>-417.32</value>
			<property>inertia/cg-z-in</property>

		</difference>
		<difference>
			<value>720.0</value>
			<property>inertia/cg-x-in</property>
		</difference>

		</quotient>
	</atan>
	</product>
   	</function>
	<output>propulsion/engine[3]/pitch-to-CoG</output>
	<output>propulsion/engine[4]/pitch-to-CoG</output>
   </fcs_function>


   <fcs_function name="Pitch OMS 1 2 to CoG">
	<function>
	<product>
	<value>-1.0</value>
	<atan>
		<quotient>
		<difference>
			<value>16.17</value>
			<property>inertia/cg-z-in</property>

		</difference>
		<difference>
			<value>700.0</value>
			<property>inertia/cg-x-in</property>
		</difference>

		</quotient>
	</atan>
	</product>
   	</function>
	<output>propulsion/engine[5]/pitch-angle-rad</output>
	<output>propulsion/engine[6]/pitch-angle-rad</output>
   </fcs_function>


  <aerosurface_scale name= "Pitch thrust command SSME 1">
   <input>fcs/elevator-pos-norm</input>
   <zero_centered>false</zero_centered>
   <domain>
        <min> -1.0 </min>
        <max>  1.0 </max>
   </domain>
   <range>
        <min> -0.17 </min>
        <max>  0.17 </max>
   </range>
   <output>propulsion/engine[0]/pitch-angle-rad</output>
 </aerosurface_scale>

  <aerosurface_scale name= "Pitch thrust command SSME 2">
   <input>fcs/elevator-pos-norm</input>
   <zero_centered>false</zero_centered>
   <domain>
        <min> -1.0 </min>
        <max>  1.0 </max>
   </domain>
   <range>
        <min> -0.17 </min>
        <max>  0.17 </max>
   </range>
   <output>propulsion/engine[1]/pitch-angle-rad</output>
 </aerosurface_scale>

  <aerosurface_scale name= "Pitch thrust command SSME 3">
   <input>fcs/elevator-pos-norm</input>
   <zero_centered>false</zero_centered>
   <domain>
        <min> -1.0 </min>
        <max>  1.0 </max>
   </domain>
   <range>
        <min> -0.17 </min>
        <max>  0.17 </max>
   </range>
   <output>propulsion/engine[2]/pitch-angle-rad</output>
 </aerosurface_scale>

  <aerosurface_scale name= "Pitch thrust command SRB 1">
   <input>fcs/elevator-pos-norm</input>
   <zero_centered>false</zero_centered>
   <domain>
        <min> -1.0 </min>
        <max>  1.0 </max>
   </domain>
   <range>
        <min> -0.14 </min>
        <max>  0.14 </max>
   </range>
   <output>propulsion/engine[3]/pitch-angle-rad</output>
 </aerosurface_scale>

  <aerosurface_scale name= "Pitch thrust command SRB 2">
   <input>fcs/elevator-pos-norm</input>
   <zero_centered>false</zero_centered>
   <domain>
        <min> -1.0 </min>
        <max>  1.0 </max>
   </domain>
   <range>
        <min> -0.14 </min>
        <max>  0.14 </max>
   </range>
   <output>propulsion/engine[4]/pitch-angle-rad</output>
 </aerosurface_scale>


  </channel>

  <channel name="Roll">

  <switch name="Disable airfoil roll if thrust vectoring is used">
			<default value="1.0"/>
			<test value="0.0">
				systems/fcs/control-mode == 0
			</test>
		<output>fcs/airfoil-factor-roll</output>
		</switch>

   <summer name="Roll Trim Sum">
      <input>fcs/aileron-cmd-norm</input>
      <input>fcs/roll-trim-cmd-norm</input>
      <clipto>
        <min> -1 </min>
        <max>  1 </max>
      </clipto>
   </summer>

   <aerosurface_scale name="Left Aileron Control">
      <input>fcs/roll-trim-sum</input>
      <range>
        <min> -0.35 </min>
        <max>  0.35 </max>
      </range>
      <output>fcs/left-aileron-pos-rad-command</output>
   </aerosurface_scale>

   <aerosurface_scale name="Right Aileron Control">
      <input>fcs/roll-trim-sum</input>
      <range>
        <min> -0.35 </min>
        <max>  0.35 </max>
      </range>
      <output>fcs/right-aileron-pos-rad-command</output>
   </aerosurface_scale>

  <pure_gain name="Actual Left Aileron Motion">
	<input>fcs/left-aileron-pos-rad-command</input>
	<gain>fcs/airfoil-factor-roll</gain>
	<output>fcs/left-aileron-pos-rad</output>
   </pure_gain>

  <pure_gain name="Actual Right Aileron Motion">
	<input>fcs/right-aileron-pos-rad-command</input>
	<gain>fcs/airfoil-factor-roll</gain>
	<output>fcs/right-aileron-pos-rad</output>
   </pure_gain>

   <aerosurface_scale name="left aileron normalization">
      <input>fcs/left-aileron-pos-rad-command</input>
      <domain>
        <min> -0.35 </min>
        <max>  0.35 </max>
      </domain>
      <range>
        <min> -1 </min>
        <max>  1 </max>
      </range>
      <output>fcs/left-aileron-pos-norm</output>
   </aerosurface_scale>

   <aerosurface_scale name="right aileron normalization">
      <input>fcs/right-aileron-pos-rad-command</input>
      <domain>
        <min> -0.35 </min>
        <max>  0.35 </max>
      </domain>
      <range>
        <min> -1 </min>
        <max>  1 </max>
      </range>
      <output>fcs/right-aileron-pos-norm</output>
   </aerosurface_scale>

  <aerosurface_scale name= "Roll thrust command SSME 1">
   <input>fcs/left-aileron-pos-norm</input>
   <zero_centered>false</zero_centered>
   <domain>
        <min> -1.0 </min>
        <max>  1.0 </max>
   </domain>
   <range>
        <min> -0.17 </min>
        <max>  0.17 </max>
   </range>
   <output>propulsion/engine[0]/SSME-roll</output>
 </aerosurface_scale>

  <aerosurface_scale name= "Roll thrust command SSME 2">
   <input>fcs/right-aileron-pos-norm</input>
   <zero_centered>false</zero_centered>
   <domain>
        <min> -1.0 </min>
        <max>  1.0 </max>
   </domain>
   <range>
        <min> 0.17 </min>
        <max> -0.17 </max>
   </range>
   <output>propulsion/engine[1]/SSME-roll</output>
 </aerosurface_scale>

 <summer name="SSME 1 roll Sum">
      <input>propulsion/engine[0]/pitch-angle-rad</input>
      <input>propulsion/engine[0]/SSME-roll</input>
      <input>propulsion/engine[0]/pitch-to-CoG</input>
      <clipto>
        <min> -0.45 </min>
        <max>  -0.10 </max>
      </clipto>
	<output>propulsion/engine[0]/pitch-angle-rad</output>
   </summer>

  <summer name="SSME 2 roll Sum">
      <input>propulsion/engine[1]/pitch-angle-rad</input>
      <input>propulsion/engine[1]/SSME-roll</input>
      <input>propulsion/engine[1]/pitch-to-CoG</input>
      <clipto>
        <min> -0.45 </min>
        <max>  -0.10 </max>
      </clipto>
	<output>propulsion/engine[1]/pitch-angle-rad</output>
   </summer>

  <summer name="SSME 3 roll Sum">
      <input>propulsion/engine[2]/pitch-angle-rad</input>
      <input>propulsion/engine[2]/pitch-to-CoG</input>
      <clipto>
        <min> -0.45 </min>
        <max>  -0.10 </max>
      </clipto>
	<output>propulsion/engine[2]/pitch-angle-rad</output>
   </summer>

   <!-- roll commands for SSME 1 and 2 creates a yaw moment since they have a sum net pitch angle -->
   <!-- this needs to be compensated -->


 <fcs_function name ="Thrust reduction correction SSME 1">
	<function>
		<product>
			<min>
			<quotient>
			<cos>
				<property>propulsion/engine[1]/pitch-angle-rad</property>
			 </cos>
			 <cos>
				<property>propulsion/engine[0]/pitch-angle-rad</property>
			 </cos>
			</quotient>
			<value>1.0</value>
			</min>
			<property>fcs/throttle-pos-norm[0]</property>
		</product>
	</function>
	<output>fcs/throttle-pos-norm[0]</output>
 </fcs_function>

 <fcs_function name ="Thrust reduction correction SSME 2">
	<function>
		<product>
			<min>
			<quotient>
			<cos>
				<property>propulsion/engine[0]/pitch-angle-rad</property>
		 	</cos>
			 <cos>
				<property>propulsion/engine[1]/pitch-angle-rad</property>
			 </cos>
			</quotient>
			<value>1.0</value>
			</min>
			<property>fcs/throttle-pos-norm[1]</property>
		</product>
	</function>
	<output>fcs/throttle-pos-norm[1]</output>
 </fcs_function>


  <aerosurface_scale name= "Roll thrust command SRB 1">
   <input>fcs/left-aileron-pos-norm</input>
   <zero_centered>false</zero_centered>
   <domain>
        <min> -1.0 </min>
        <max>  1.0 </max>
   </domain>
   <range>
        <min> -0.14 </min>
        <max>  0.14 </max>
   </range>
   <output>propulsion/engine[3]/SRB-roll</output>
 </aerosurface_scale>

  <aerosurface_scale name= "Roll thrust command SRB 2">
   <input>fcs/right-aileron-pos-norm</input>
   <zero_centered>false</zero_centered>
   <domain>
        <min> -1.0 </min>
        <max>  1.0 </max>
   </domain>
   <range>
        <min> 0.14 </min>
        <max>  -0.14 </max>
   </range>
   <output>propulsion/engine[4]/SRB-roll</output>
 </aerosurface_scale>

  <summer name="SRB 1 roll Sum">
      <input>propulsion/engine[3]/pitch-angle-rad</input>
      <input>propulsion/engine[3]/SRB-roll</input>
      <input>propulsion/engine[3]/pitch-to-CoG</input>
      <clipto>
        <min> -0.14 </min>
        <max>  0.14 </max>
      </clipto>
	<output>propulsion/engine[3]/pitch-angle-rad</output>
   </summer>

 <summer name="SRB 2 roll Sum">
      <input>propulsion/engine[4]/pitch-angle-rad</input>
      <input>propulsion/engine[4]/SRB-roll</input>
      <input>propulsion/engine[4]/pitch-to-CoG</input>
      <clipto>
        <min> -0.14 </min>
        <max>  0.14 </max>
      </clipto>
	<output>propulsion/engine[4]/pitch-angle-rad</output>
   </summer>

  </channel>

  <channel name="Yaw">

  <switch name="Disable airfoil yaw if thrust vectoring is used">
			<default value="1.0"/>
			<test value="0.0">
				systems/fcs/control-mode == 0
			</test>
		<output>fcs/airfoil-factor-yaw</output>
		</switch>

   <summer name="Rudder Command Sum">
      <input>fcs/rudder-cmd-norm</input>
      <input>fcs/yaw-trim-cmd-norm</input>
      <clipto>
        <min> -0.35 </min>
        <max>  0.35 </max>
      </clipto>
   </summer>

   <scheduled_gain name="Yaw Damper Rate">
      <input>velocities/r-aero-rad_sec</input>
      <table>
        <independentVar lookup="row">velocities/ve-kts</independentVar>
         <tableData>
            30     0.00
            60     2.00
         </tableData>
      </table>
   </scheduled_gain>

   <scheduled_gain name="Yaw Damper Beta">
      <input>aero/beta-rad</input>
      <table>
        <independentVar lookup="row">velocities/ve-kts</independentVar>
        <tableData>
           30     0.00
           60     0.00
        </tableData>
      </table>
   </scheduled_gain>

   <summer name="Yaw Damper Sum">
      <input>fcs/yaw-damper-beta</input>
      <input>fcs/yaw-damper-rate</input>
      <clipto>
        <min> -0.1 </min>
        <max>  0.1 </max>
      </clipto>
   </summer>

   <scheduled_gain name="Yaw Damper Final">
      <input>fcs/yaw-damper-sum</input>
      <table>
        <independentVar lookup="row">velocities/ve-kts</independentVar>
        <tableData>
           30         0.0
           31         1.0
        </tableData>
      </table>
   </scheduled_gain>

   <summer name="Rudder Sum">
      <input>fcs/rudder-command-sum</input>
      <input>fcs/yaw-damper-final</input>
      <clipto>
        <min> -1 </min>
        <max>  1 </max>
      </clipto>
   </summer>

   <aerosurface_scale name="Rudder Control">
      <input>fcs/rudder-sum</input>
      <range>
        <min> -0.35 </min>
        <max>  0.35 </max>
      </range>
      <output>fcs/rudder-pos-rad-command</output>
   </aerosurface_scale>

  <pure_gain name="Actual Rudder Motion">
	<input>fcs/rudder-pos-rad-command</input>
	<gain>fcs/airfoil-factor-yaw</gain>
	<output>fcs/rudder-pos-rad</output>
   </pure_gain>

   <aerosurface_scale name="rudder normalization">
      <input>fcs/rudder-pos-rad-command</input>
      <domain>
        <min> -0.35 </min>
        <max>  0.35 </max>
      </domain>
      <range>
        <min> -1.0 </min>
        <max>  1.0 </max>
      </range>
      <output>fcs/rudder-pos-norm</output>
   </aerosurface_scale>

 <aerosurface_scale name= "Yaw thrust command SRB 1">
   <input>fcs/rudder-pos-norm</input>
   <zero_centered>false</zero_centered>
   <domain>
        <min> -1.0 </min>
        <max>  1.0 </max>
   </domain>
   <range>
        <min> -0.14 </min>
        <max>  0.14 </max>
   </range>
   <output>propulsion/engine[3]/yaw-angle-rad</output>
 </aerosurface_scale>

 <aerosurface_scale name= "Yaw thrust command SRB 2">
   <input>fcs/rudder-pos-norm</input>
   <zero_centered>false</zero_centered>
   <domain>
        <min> -1.0 </min>
        <max>  1.0 </max>
   </domain>
   <range>
        <min> -0.14 </min>
        <max>  0.14 </max>
   </range>
   <output>propulsion/engine[4]/yaw-angle-rad</output>
 </aerosurface_scale>

 <fcs_function name="Yaw SSME 1  to CoG">
 <function>
	<product>
	<value>-1.0</value>
	<atan>
		<quotient>
		<difference>
			<value>-53.0</value>
			<property>inertia/cg-y-in</property>
		</difference>
		<difference>
			<value>700</value>
			<property>inertia/cg-x-in</property>

		</difference>

		</quotient>
	</atan>
	</product>
   	</function>
	<output>propulsion/engine[0]/yaw-to-CoG</output>
   </fcs_function>

 <fcs_function name="Yaw SSME 2  to CoG">
 <function>
	<product>
	<value>-1.0</value>
	<atan>
		<quotient>
		<difference>
			<value>53.0</value>
			<property>inertia/cg-y-in</property>
		</difference>
		<difference>
			<value>700</value>
			<property>inertia/cg-x-in</property>

		</difference>

		</quotient>
	</atan>
	</product>
   	</function>
	<output>propulsion/engine[1]/yaw-to-CoG</output>
   </fcs_function>

  <fcs_function name="Yaw OMS 1  to CoG">
  <function>
	<product>
	<value>-1.0</value>
	<atan>
		<quotient>
		<difference>
			<value>-60.0</value>
			<property>inertia/cg-y-in</property>
		</difference>
		<difference>
			<value>700</value>
			<property>inertia/cg-x-in</property>

		</difference>

		</quotient>
	</atan>
	</product>
   	</function>
	<output>propulsion/engine[5]/yaw-angle-rad</output>
   </fcs_function>

  <fcs_function name="Yaw OMS 2  to CoG">
  <function>
	<product>
	<value>-1.0</value>
	<atan>
		<quotient>
		<difference>
			<value>60.0</value>
			<property>inertia/cg-y-in</property>
		</difference>
		<difference>
			<value>700</value>
			<property>inertia/cg-x-in</property>

		</difference>

		</quotient>
	</atan>
	</product>
   	</function>
	<output>propulsion/engine[6]/yaw-angle-rad</output>
   </fcs_function>

 <aerosurface_scale name= "Yaw thrust command SSME 1">
   <input>fcs/rudder-pos-norm</input>
   <zero_centered>false</zero_centered>
   <domain>
        <min> -1.0 </min>
        <max>  1.0 </max>
   </domain>
   <!-- this is a hack, in reality the ET inertia reduces yaw response, but JSBSim can't-->
   <!-- include extended tank inertia, so we limit it in the FCS by not using the full gimbal range-->
   <!--<range>
        <min> -0.17 </min>
        <max>  0.17 </max>
   </range>-->
  <range>
        <min> -0.05 </min>
        <max>  0.05 </max>
   </range>
   <output>propulsion/engine[0]/yaw-angle-rad</output>
 </aerosurface_scale>

  <summer name="SSME 1  yaw Sum">
      <input>propulsion/engine[0]/yaw-angle-rad</input>
      <input>propulsion/engine[0]/yaw-to-CoG</input>
      <clipto>
        <min> -0.1 </min>
        <max>  0.2  </max>
      </clipto>
	<output>propulsion/engine[0]/yaw-angle-rad</output>
   </summer>


 <aerosurface_scale name= "Yaw thrust command SSME 2">
   <input>fcs/rudder-pos-norm</input>
   <zero_centered>false</zero_centered>
   <domain>
        <min> -1.0 </min>
        <max>  1.0 </max>
   </domain>
   <!--<range>
        <min> -0.17 </min>
        <max>  0.17 </max>
   </range>-->
   <range>
        <min> -0.05 </min>
        <max>  0.05 </max>
   </range>
   <output>propulsion/engine[1]/yaw-angle-rad</output>
 </aerosurface_scale>

 <summer name="SSME 2  yaw Sum">
      <input>propulsion/engine[1]/yaw-angle-rad</input>
      <input>propulsion/engine[1]/yaw-to-CoG</input>
      <clipto>
        <min> -0.2 </min>
        <max>  0.1  </max>
      </clipto>
	<output>propulsion/engine[1]/yaw-angle-rad</output>
   </summer>


 <aerosurface_scale name= "Yaw thrust command SSME 3">
   <input>fcs/rudder-pos-norm</input>
   <zero_centered>false</zero_centered>
   <domain>
        <min> -1.0 </min>
        <max>  1.0 </max>
   </domain>
   <!--<range>
        <min> -0.17 </min>
        <max>  0.17 </max>
   </range>-->
   <range>
        <min> -0.05 </min>
        <max>  0.05 </max>
   </range>
   <output>propulsion/engine[2]/yaw-angle-rad</output>
 </aerosurface_scale>

  </channel>

  <!--<channel name="Flaps">
   <kinematic name="Flaps Control">
     <input>fcs/flap-cmd-norm</input>
     <traverse>
       <setting>
          <position>  0 </position>
          <time>      0 </time>
       </setting>
       <setting>
          <position>  4 </position>
          <time>      4 </time>
       </setting>
       <setting>
          <position> 8 </position>
          <time>     3 </time>
       </setting>
       <setting>
          <position> 12 </position>
          <time>      3 </time>
       </setting>
     </traverse>
     <output>fcs/flap-pos-deg</output>
   </kinematic>

   <aerosurface_scale name="flap normalization">
      <input>fcs/flap-pos-deg</input>
      <domain>
        <min>  0 </min>
        <max> 12 </max>
      </domain>
      <range>
        <min> 0 </min>
        <max> 1 </max>
      </range>
      <output>fcs/flap-pos-norm</output>
   </aerosurface_scale>

  </channel>-->

  <channel name="Landing Gear">
   <kinematic name="Gear Control">
     <input>gear/gear-cmd-norm</input>
     <traverse>
       <setting>
          <position> 0 </position>
          <time>     0 </time>
       </setting>
       <setting>
          <position> 1 </position>
          <time>     5 </time>
       </setting>
     </traverse>
     <output>gear/gear-pos-norm</output>
   </kinematic>

  </channel>

  <channel name="Speedbrake">
   <kinematic name="Speedbrake Control">
     <input>fcs/speedbrake-cmd-norm</input>
     <traverse>
       <setting>
          <position> 0 </position>
          <time>     0 </time>
       </setting>
       <setting>
          <position> 1 </position>
          <time>     3 </time>
       </setting>
     </traverse>
     <output>fcs/speedbrake-pos-norm</output>
   </kinematic>

  </channel>


 <!-- Parachute -->
  <channel name="chute">
   <fcs_function name="fcs/parachute_reef_pos_norm">
    <function>
     <product>
      <value>0.5</value>
      <property>/controls/shuttle/parachute</property>
     </product>
    </function>
    <clipto>
     <min>0.0</min>
     <max>1.0</max>
    </clipto>
   </fcs_function>

  <pure_gain name="metrics/chute-sqft">
    <input>fcs/parachute_reef_pos_norm</input>
    <gain> 600.0 </gain> <!-- Area of braking chute = ca 650-->
   </pure_gain>
  </channel>
<!-- Parachute -->


 </flight_control>

 <aerodynamics>

  <function name="aero/coefficient/K">
	<product>
		<value>0.5</value>
		<sum>
		<value>1.0</value>
			<pow>
			<abs>
				<difference>
				<value>1.0</value>
				<pow>
					<quotient>
					<property>velocities/mach</property>
					<value>1.25</value>
					</quotient>
					<value>2.0</value>
				</pow>
				</difference>
			</abs>
			<value>0.5</value>
			</pow>
		</sum>
	</product>
  </function>

  <function name="aero/coefficient/CLtest">
	<product>
	<sum>
			<value>-0.053</value>
			<product>
				<value>2.73</value>
				<property>aero/alpha-rad</property>
			</product>
			<product>
				<value>-1.55</value>
				<pow>
					<property>aero/alpha-rad</property>
					<value>2.0</value>
				</pow>
			</product>
		</sum>
		<pow>
		<property>aero/coefficient/K</property>
		<sum>
			<value>-1.01</value>
			<product>
				<property>aero/alpha-rad</property>
				<value>1.1</value>
			</product>
		</sum>
		</pow>
	</product>

  </function>


  <function name="aero/coefficient/CDtest">
<product>

    		<sum>
			<value>0.01</value>
			<product>
				<value>0.028</value>
				<pow>
					<property>velocities/mach</property>
					<value>1.4</value>
				</pow>
			</product>
			<product>
				<value>1.79</value>
				<pow>
					<property>aero/alpha-rad</property>
					<value>2.0</value>
				</pow>
			</product>
		</sum>
		<pow>
		<property>aero/coefficient/K</property>
		<sum>
			<value>-1.4</value>
			<product>
				<property>aero/alpha-rad</property>
				<value>1.5</value>
			</product>
		</sum>
		</pow>
	</product>
</function>

 <function name="aero/coefficient/GS">
	<quotient>
		<property>aero/coefficient/CLtest</property>
		<property>aero/coefficient/CDtest</property>
	</quotient>
 </function>


  <axis name="LIFT">
	<function name="aero/coefficient/CL">
	<description>2d parametrization of the lift as function of AoA and Mach number</description>
	<product>
        	<property>aero/qbar-psf</property>
         	<property>metrics/Sw-sqft</property>
    		<sum>
			<value>-0.053</value>
			<product>
				<value>2.73</value>
				<property>aero/alpha-rad</property>
			</product>
			<product>
				<value>-1.55</value>
				<pow>
					<property>aero/alpha-rad</property>
					<value>2.0</value>
				</pow>
			</product>
		</sum>
		<pow>
		<property>aero/coefficient/K</property>
		<sum>
			<value>-1.01</value>
			<product>
				<property>aero/alpha-rad</property>
				<value>1.1</value>
			</product>
		</sum>
		</pow>
	</product>
	</function>
  </axis>

  <axis name="DRAG">
	<function name="aero/coefficient/CD">
	<description>2d parametrization of the drag as function of AoA and Mach number</description>
	<product>
        	<property>aero/qbar-psf</property>
         	<property>metrics/Sw-sqft</property>
    		<sum>
			<value>0.01</value>
			<product>
				<value>0.028</value>
				<pow>
					<property>velocities/mach</property>
					<value>1.4</value>
				</pow>
			</product>
			<product>
				<value>1.79</value>
				<pow>
					<property>aero/alpha-rad</property>
					<value>2.0</value>
				</pow>
			</product>
		</sum>
		<pow>
		<property>aero/coefficient/K</property>
		<sum>
			<value>-1.4</value>
			<product>
				<property>aero/alpha-rad</property>
				<value>1.5</value>
			</product>
		</sum>
		</pow>
	</product>
	</function>

	<function name="aero/coefficient/CDgear">
        	<description>Drag of landing gear</description>
         	<product>
           		<property>aero/qbar-psf</property>
           		<property>metrics/Sw-sqft</property>
           		<property>gear/gear-pos-norm</property>
           		<value>0.013</value>
         	</product>
   	</function>

    	<function name="aero/coefficient/CDSb">
       	<description>Drag of the tail speedbrake</description>
         	<product>
           		<property>aero/qbar-psf</property>
           		<property>metrics/Sw-sqft</property>
           		<property>fcs/speedbrake-pos-norm</property>
           		<value>0.019</value>
         	</product>
    	</function>

	<function name="aero/coefficient/CDpc">
    	<description>Drag of braking parachute</description>
    		<product>
     			<property>aero/qbar-psf</property>
     			<property>metrics/chute-sqft</property>
     			<property>fcs/parachute_reef_pos_norm</property>
     			<value>0.25</value>
    			</product>
   	</function>


  </axis>

  <axis name="SIDE">

    <function name="aero/coefficient/CYb">
       <description>Side_force_due_to_beta</description>
       <product>
           <property>aero/qbar-psf</property>
           <property>metrics/Sw-sqft</property>
           <property>aero/beta-rad</property>
           <value>-1</value>
       </product>
    </function>

  </axis>

  <axis name="ROLL">

    <function name="aero/coefficient/Clb">
       <description>Roll_moment_due_to_beta</description>
       <product>
           <property>aero/qbar-psf</property>
           <property>metrics/Sw-sqft</property>
           <property>metrics/bw-ft</property>
           <property>aero/beta-rad</property>
           <value>-0.1</value>
       </product>
    </function>

    <function name="aero/coefficient/Clp">
       <description>Roll_moment_due_to_roll_rate</description>
       <product>
           <property>aero/qbar-psf</property>
           <property>metrics/Sw-sqft</property>
           <property>metrics/bw-ft</property>
           <property>aero/bi2vel</property>
           <property>velocities/p-aero-rad_sec</property>
           <value>-0.4</value>
       </product>
    </function>

    <function name="aero/coefficient/Clr">
       <description>Roll_moment_due_to_yaw_rate</description>
       <product>
           <property>aero/qbar-psf</property>
           <property>metrics/Sw-sqft</property>
           <property>metrics/bw-ft</property>
           <property>aero/bi2vel</property>
           <property>velocities/r-aero-rad_sec</property>
           <value>0.15</value>
       </product>
    </function>

    <function name="aero/coefficient/Clda">
       <description>Roll_moment_due_to_aileron</description>
       <product>
          <property>aero/qbar-psf</property>
          <property>metrics/Sw-sqft</property>
          <property>metrics/bw-ft</property>
          <property>fcs/left-aileron-pos-rad</property>
          <!--<table>
            <independentVar lookup="row">velocities/mach</independentVar>
            <tableData>
              0.0    0.100
              2.0    0.033
            </tableData>
          </table>-->
 	<table>
                  <independentVar lookup="row">velocities/mach</independentVar>
                  <independentVar lookup="column">position/h-sl-ft</independentVar>
                  <tableData>
                                0.0000	80000.0000
                              0.0000	0.0500	0.0500
                              0.4000	0.0700	0.0500
                              0.6000	0.0800	0.0500
                              1.0000	0.1100	0.0500
                              1.4000	0.0800	0.0600
                              1.6000	0.0700	0.0600
                              2.4000	0.0600	0.0500
                              6.0000	0.0300	0.0200
                   </tableData>
         </table>
       </product>
    </function>

    <function name="aero/coefficient/Cldr">
       <description>Roll_moment_due_to_rudder</description>
       <product>
           <property>aero/qbar-psf</property>
           <property>metrics/Sw-sqft</property>
           <property>metrics/bw-ft</property>
           <property>fcs/rudder-pos-rad</property>
           <value>0.01</value>
       </product>
    </function>


  </axis>

  <axis name="PITCH">

    <function name="aero/coefficient/Cmalpha">
       <description>Pitch_moment_due_to_alpha</description>
       <product>
           <property>aero/qbar-psf</property>
           <property>metrics/Sw-sqft</property>
           <property>metrics/cbarw-ft</property>
           <property>aero/alpha-rad</property>
           <value>-0.6</value>
	   <!-- the shuttle enters at 40 deg AoA, and to my knowledge that's irreversible, so there needs to be -->
	   <!-- a reduction in the counter-acting force at high AoA -->
	   <!-- the concept as such is sound, but the table is guesswork -->
	  <table>
		<independentVar lookup="row">aero/alpha-rad</independentVar>
		<tableData>
			0.0	1.0
			0.5	0.6
			0.7	0.2
			1.5	0.1
		</tableData>
	  </table>
       </product>
    </function>

    <function name="aero/coefficient/Cmde">
       <description>Pitch_moment_due_to_elevator</description>
       <product>
          <property>aero/qbar-psf</property>
          <property>metrics/Sw-sqft</property>
          <property>metrics/cbarw-ft</property>
          <property>fcs/elevator-pos-rad</property>
          <table>
            <independentVar lookup="row">velocities/mach</independentVar>
            <tableData>
              0.0     -1.200
              2.0     -0.300
            </tableData>
          </table>
       </product>
    </function>

    <function name="aero/coefficient/Cmq">
       <description>Pitch_moment_due_to_pitch_rate</description>
       <product>
           <property>aero/qbar-psf</property>
           <property>metrics/Sw-sqft</property>
           <property>metrics/cbarw-ft</property>
           <property>aero/ci2vel</property>
           <property>velocities/q-aero-rad_sec</property>
           <!--<value>-17</value>-->
	  <value>-70</value>
       </product>
    </function>

    <function name="aero/coefficient/Cmadot">
       <description>Pitch_moment_due_to_alpha_rate</description>
       <product>
           <property>aero/qbar-psf</property>
           <property>metrics/Sw-sqft</property>
           <property>metrics/cbarw-ft</property>
           <property>aero/ci2vel</property>
           <property>aero/alphadot-rad_sec</property>
           <value>-6</value>
       </product>
    </function>


  </axis>

  <axis name="YAW">

    <function name="aero/coefficient/Cnb">
       <description>Yaw_moment_due_to_beta</description>
       <product>
           <property>aero/qbar-psf</property>
           <property>metrics/Sw-sqft</property>
           <property>metrics/bw-ft</property>
           <property>aero/beta-rad</property>
           <value>0.12</value>
       </product>
    </function>

    <function name="aero/coefficient/Cnr">
       <description>Yaw_moment_due_to_yaw_rate</description>
       <product>
           <property>aero/qbar-psf</property>
           <property>metrics/Sw-sqft</property>
           <property>metrics/bw-ft</property>
           <property>aero/bi2vel</property>
           <property>velocities/r-aero-rad_sec</property>
           <value>-0.15</value>
       </product>
    </function>

    <function name="aero/coefficient/Cndr">
       <description>Yaw_moment_due_to_rudder</description>
       <product>
           <property>aero/qbar-psf</property>
           <property>metrics/Sw-sqft</property>
           <property>metrics/bw-ft</property>
           <property>fcs/rudder-pos-rad</property>
           <value>-0.1</value>
       </product>
    </function>

    <function name="aero/coefficient/Cnda">
       <description>Adverse_yaw</description>
       <product>
           <property>aero/qbar-psf</property>
           <property>metrics/Sw-sqft</property>
           <property>metrics/bw-ft</property>
           <property>fcs/left-aileron-pos-rad</property>
           <value>0</value>
       </product>
    </function>


  </axis>

 </aerodynamics>


 <!-- Parachute 0.3 war 1.4-->
 <external_reactions>
  <force name="parachute" frame="WIND">
    <function>
      <product>
        <property>aero/qbar-psf</property>
        <property>metrics/chute-sqft</property>
	<property>fcs/parachute_reef_pos_norm</property>
        <value> 0.3 </value> <!-- Full drag coefficient -->
      </product>
    </function>
    <location unit="FT">
      <x> 17.70</x>
      <y> 0</y>
      <z>-1.0</z>
    </location>
    <!-- The direction describes a unit vector. In this case, since
         the selected frame is the WIND frame, the "-1" x component
         describes a direction exactly opposite of the direction
         into the wind vector. That is, the direction specified below
         is the direction that the drag force acts in. -->
    <direction>
      <x>-1</x>
      <y>0</y>
      <z>0</z>
    </direction>
  </force>
 </external_reactions>


 <system file="orbital_parameters"></system>
 <system file="rcs_control"></system>
 <system file="computations"></system>
 <system file="entry_guidance"></system>

</fdm_config>
